$PROBLEM    031 SAEM
$INPUT ROW ID TIME EVID CMT AMT II ADDL DV MDV

$DATA ./NMsimData_xgxr032_NWPRI.csv
IGN=@

$SUBROUTINE ADVAN4 TRANS4
$PK
LTVKA=THETA(1)
LTVV2=THETA(2)
LTVCL=THETA(3)
LTVV3=THETA(4)
LTVQ=THETA(5)

MU_1=LTVKA
KA=EXP(MU_1+ETA(1))
MU_2=LTVV2
V2=EXP(MU_2+ETA(2))
MU_3=LTVCL
CL=EXP(MU_3+ETA(3))
MU_4=LTVV3
V3=EXP(MU_4+ETA(4))
MU_5 = LTVQ
Q =EXP(MU_5+ETA(5))
S2=V2

$ERROR
IPRED=F
IRES=DV-IPRED

IF (IPRED.GT.1) THEN
W = SQRT(IPRED**2*SIGMA(1,1) + SIGMA(2,2))
ELSE
W=1
ENDIF

IWRES=IRES/W
Y=F+F*ERR(1)+ERR(2)

;-----------------------INITIAL ESTIMATES---------------------------------
THETA1 = THETA(1)
THETA2 = THETA(2)
THETA3 = THETA(3)
THETA4 = THETA(4)
THETA5 = THETA(5)
OMEGA1_1 = OMEGA(1,1)
OMEGA2_1 = OMEGA(2,1)
OMEGA2_2 = OMEGA(2,2)
OMEGA3_1 = OMEGA(3,1)
OMEGA3_2 = OMEGA(3,2)
OMEGA3_3 = OMEGA(3,3)
OMEGA4_1 = OMEGA(4,1)
OMEGA4_2 = OMEGA(4,2)
OMEGA4_3 = OMEGA(4,3)
OMEGA4_4 = OMEGA(4,4)
OMEGA5_1 = OMEGA(5,1)
OMEGA5_2 = OMEGA(5,2)
OMEGA5_3 = OMEGA(5,3)
OMEGA5_4 = OMEGA(5,4)
OMEGA5_5 = OMEGA(5,5)
SIGMA1_1 = SIGMA(1,1)
SIGMA2_1 = SIGMA(2,1)
SIGMA2_2 = SIGMA(2,2)

$THETA  0.815289 ; LTVKA
$THETA  4.32551 ; LTVV2
$THETA  2.48851 ; LTVCL
$THETA  5.3217 ; LTVV3
$THETA  2.19263 ; LTVQ
$OMEGA  0  FIX
$OMEGA  0.174967
$OMEGA  0.312356
$OMEGA  0  FIX
$OMEGA  0  FIX
$SIGMA  0.0810297
$SIGMA  0  FIX
;; $ESTIMATION METHOD=1 POSTHOC INTER MAXEVAL=9999 NSIG=2 SIGL=9
;;            PRINT=10 NOABORT MSFO=xgxr032.msf


$PRIOR NWPRI PLEV=0.999000
$THETAP
0.815289 FIX
4.32551 FIX
2.48851 FIX
5.3217 FIX
2.19263 FIX
$THETAPV BLOCK(5) FIX
0.00254696
0.00116851 0.00301062
-0.00136046 -0.000470525 0.0229154
0.00420938 0.00270713 -0.0536616 0.161148
0.00111814 0.000538161 -0.0182445 0.0520821 0.0185022
$OMEGAP 1e-30 FIX
$OMEGAP 0.174967 FIX
$OMEGAP 0.312356 FIX
$OMEGAP 1e-30 FIX
$OMEGAP 1e-30 FIX
$OMEGAPD 1 FIX
$OMEGAPD 56.6925999110253 FIX
$OMEGAPD 73.5224260790466 FIX
$OMEGAPD 1 FIX
$OMEGAPD 1 FIX
$SIGMAP 0.0810297 FIX
$SIGMAP 1e-30 FIX
$SIGMAPD 442.208701275374 FIX
$SIGMAPD 1 FIX

$SIMULATION ONLYSIM (1129202719)
TRUE=PRIOR SUBPROBLEMS=250

$TABLE PRED IPRED Y THETA1 THETA2 THETA3 THETA4 THETA5 OMEGA1_1 OMEGA2_1 OMEGA2_2 OMEGA3_1 OMEGA3_2 OMEGA3_3 OMEGA4_1 OMEGA4_2 OMEGA4_3 OMEGA4_4 OMEGA5_1 OMEGA5_2 OMEGA5_3 OMEGA5_4 OMEGA5_5 SIGMA1_1 SIGMA2_1 SIGMA2_2 NOPRINT NOAPPEND FILE=xgxr032_NWPRI.tab
