Mon 10/22/2018
01:15 PM
; Used for comparing single versus parallel computing for FOCE method.
$PROB RUN# Example 1 (from samp5l)
$INPUT C SET ID JID TIME  DV=CONC AMT=DOSE RATE EVID MDV CMT CLX V1X QX V2X SDIX SDSX
$DATA example1.csv IGNORE=C

$SUBROUTINES ADVAN3 TRANS4

$PK
MU_1=THETA(1)
MU_2=THETA(2)
MU_3=THETA(3)
MU_4=THETA(4)
CL=DEXP(MU_1+ETA(1))
V1=DEXP(MU_2+ETA(2))
Q=DEXP(MU_3+ETA(3))
V2=DEXP(MU_4+ETA(4))
S1=V1

LCL=LOG(CL)
LV1=LOG(V1)
LQ=LOG(Q)
LV2=LOG(V2)
RECNO=NDREC

$ERROR
IPRED=F
If(COMACT==1) PREDU=IPRED
Y = IPRED + IPRED*EPS(1)

; Initial values of THETA
$THETA 2 2 2 2
;INITIAL values of OMEGA
$OMEGA BLOCK(4)
0.15   ;[P]
0.01  ;[F]
0.15   ;[P]
0.01  ;[F]
0.01  ;[F]
0.15   ;[P]
0.01  ;[F]
0.01  ;[F]
0.01  ;[F]
0.15   ;[P]
;Initial value of SIGMA
$SIGMA
(0.6 )   ;[P]

$EST METHOD=1 INTERACTION NSIG=3 PRINT=1 NOABORT  MAXEVAL=9999 SIGL=10 FAST
$COV MATRIX=R PRINT=E UNCONDITIONAL
$TABLE ID RECNO TIME IPRED PREDU PRED VARCALC=3 NOAPPEND NOPRINT FILE=predu.tab

NM-TRAN MESSAGES
 WARNINGS AND ERRORS (IF ANY) FOR PROBLEM    1
 (WARNING  2) NM-TRAN INFERS THAT THE DATA ARE POPULATION.

1NONLINEAR MIXED EFFECTS MODEL PROGRAM (NONMEM) VERSION 7.5.0 alpha version 4
 ORIGINALLY DEVELOPED BY STUART BEAL, LEWIS SHEINER, AND ALISON BOECKMANN
 CURRENT DEVELOPERS ARE ROBERT BAUER, ICON DEVELOPMENT SOLUTIONS,
 AND ALISON BOECKMANN. IMPLEMENTATION, EFFICIENCY, AND STANDARDIZATION
 PERFORMED BY NOUS INFOSYSTEMS.
 PROBLEM NO.:         1
 RUN# Example 1 (from samp5l)
 TOT. NO. OF OBS RECS:      500
 TOT. NO. OF INDIVIDUALS:      100
 TWO COMPARTMENT MODEL (ADVAN3)
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 #TBLN:      1
 #METH: First Order Conditional Estimation with Interaction
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
 #TERM:
0MINIMIZATION SUCCESSFUL
 NO. OF FUNCTION EVALUATIONS USED:      113
 NO. OF SIG. DIGITS IN FINAL EST.:  3.5

 ETABAR IS THE ARITHMETIC MEAN OF THE ETA-ESTIMATES,
 AND THE P-VALUE IS GIVEN FOR THE NULL HYPOTHESIS THAT THE TRUE MEAN IS 0.

 ETABAR:        -9.0712E-06 -1.1912E-02 -3.4882E-03 -1.1581E-02
 SE:             3.9192E-02  2.8850E-02  3.2733E-02  3.3061E-02
 N:                     100         100         100         100

 P VAL.:         9.9982E-01  6.7969E-01  9.1513E-01  7.2612E-01

 ETASHRINKSD(%)  3.0453E+00  2.0021E+01  2.4031E+01  1.4177E+01
 ETASHRINKVR(%)  5.9978E+00  3.6033E+01  4.2287E+01  2.6344E+01
 EBVSHRINKSD(%)  3.3163E+00  1.9861E+01  2.4451E+01  1.5063E+01
 EBVSHRINKVR(%)  6.5226E+00  3.5777E+01  4.2923E+01  2.7858E+01
 EPSSHRINKSD(%)  3.0940E+01
 EPSSHRINKVR(%)  5.2308E+01


 TOTAL DATA POINTS NORMALLY DISTRIBUTED (N):          500
 N*LOG(2PI) CONSTANT TO OBJECTIVE FUNCTION:    918.938533204673
 OBJECTIVE FUNCTION VALUE WITHOUT CONSTANT:   -1121.02837222258
 OBJECTIVE FUNCTION VALUE WITH CONSTANT:      -202.089839017911
 REPORTED OBJECTIVE FUNCTION DOES NOT CONTAIN CONSTANT

 TOTAL EFFECTIVE ETAS (NIND*NETA):                           400


 #TERE:
 Elapsed estimation  time in seconds:     9.56
 Elapsed covariance  time in seconds:     2.01
 Elapsed postprocess time in seconds:     0.22

 ********************               FIRST ORDER CONDITIONAL ESTIMATION WITH INTERACTION              ********************
 #OBJT:**************                       MINIMUM VALUE OF OBJECTIVE FUNCTION                      ********************
 #OBJV:********************************************    -1121.028       **************************************************

 ********************               FIRST ORDER CONDITIONAL ESTIMATION WITH INTERACTION              ********************
 ********************                             FINAL PARAMETER ESTIMATE                           ********************

 THETA - VECTOR OF FIXED EFFECTS PARAMETERS   *********
         TH 1      TH 2      TH 3      TH 4
         1.69E+00  1.61E+00  8.20E-01  2.39E+00

 OMEGA - COV MATRIX FOR RANDOM EFFECTS - ETAS  ********
         ETA1      ETA2      ETA3      ETA4
 ETA1
+        1.65E-01
 ETA2
+       -7.44E-04  1.31E-01
 ETA3
+        1.24E-02  1.59E-02  1.88E-01
 ETA4
+       -1.27E-02  1.39E-02  3.33E-02  1.50E-01

 SIGMA - COV MATRIX FOR RANDOM EFFECTS - EPSILONS  ****
         EPS1
 EPS1
+        5.72E-02

 OMEGA - CORR MATRIX FOR RANDOM EFFECTS - ETAS  *******
         ETA1      ETA2      ETA3      ETA4
 ETA1
+        4.06E-01
 ETA2
+       -5.05E-03  3.63E-01
 ETA3
+        7.05E-02  1.02E-01  4.33E-01
 ETA4
+       -8.10E-02  9.90E-02  1.98E-01  3.87E-01

 SIGMA - CORR MATRIX FOR RANDOM EFFECTS - EPSILONS  ***
         EPS1
 EPS1
+        2.39E-01

 ********************               FIRST ORDER CONDITIONAL ESTIMATION WITH INTERACTION              ********************
 ********************                            STANDARD ERROR OF ESTIMATE                          ********************

 THETA - VECTOR OF FIXED EFFECTS PARAMETERS   *********
         TH 1      TH 2      TH 3      TH 4
         4.32E-02  4.78E-02  7.05E-02  5.18E-02

 OMEGA - COV MATRIX FOR RANDOM EFFECTS - ETAS  ********
         ETA1      ETA2      ETA3      ETA4
 ETA1
+        2.71E-02
 ETA2
+        2.14E-02  3.15E-02
 ETA3
+        3.05E-02  3.54E-02  7.82E-02
 ETA4
+        2.39E-02  2.35E-02  4.61E-02  3.97E-02

 SIGMA - COV MATRIX FOR RANDOM EFFECTS - EPSILONS  ****
         EPS1
 EPS1
+        8.27E-03

 OMEGA - CORR MATRIX FOR RANDOM EFFECTS - ETAS  *******
         ETA1      ETA2      ETA3      ETA4
 ETA1
+        3.34E-02
 ETA2
+        1.46E-01  4.34E-02
 ETA3
+        1.65E-01  2.28E-01  9.03E-02
 ETA4
+        1.57E-01  1.63E-01  2.24E-01  5.13E-02

 SIGMA - CORR MATRIX FOR RANDOM EFFECTS - EPSILONS  ***
         EPS1
 EPS1
+        1.73E-02

 ********************               FIRST ORDER CONDITIONAL ESTIMATION WITH INTERACTION              ********************
 ********************                          COVARIANCE MATRIX OF ESTIMATE                         ********************

            TH 1      TH 2      TH 3      TH 4      OM11      OM12      OM13      OM14      OM22      OM23      OM24      OM33
             OM34      OM44      SG11
 TH 1
+        1.87E-03
 TH 2
+        2.46E-04  2.29E-03
 TH 3
+        5.79E-04  2.36E-04  4.96E-03
 TH 4
+        2.44E-04  3.27E-04  1.97E-03  2.68E-03
 OM11
+        7.39E-05  1.38E-04  2.01E-04  1.65E-04  7.35E-04
 OM12
+        7.92E-05  1.30E-04  2.61E-04  1.71E-04  1.39E-04  4.58E-04
 OM13
+        1.12E-04  1.87E-04  3.83E-05  2.14E-04  2.76E-04  1.59E-04  9.29E-04
 OM14
+        9.39E-05  1.32E-04  2.36E-04  2.14E-04  1.49E-04  1.46E-04  4.30E-04  5.71E-04
 OM22
+       -3.85E-06  3.72E-05 -2.48E-04 -7.23E-05  2.03E-05  9.71E-05  1.06E-04  6.78E-05  9.92E-04
 OM23
+        5.65E-05  9.64E-05  8.31E-04  2.48E-04  6.00E-05  1.69E-04 -6.00E-05  2.24E-05 -5.02E-05  1.25E-03
 OM24
+        3.11E-05 -1.39E-05  3.14E-04  1.84E-04  3.74E-05  5.74E-05  5.26E-05  9.99E-05  1.38E-04  3.36E-04  5.51E-04
 OM33
+        2.57E-04  1.74E-05  9.09E-04  6.96E-04  3.61E-04  3.57E-04  1.09E-03  6.81E-04  3.90E-04 -5.56E-06  2.49E-04  6.12E-03
 OM34
+        1.57E-04  6.73E-05  3.50E-04  3.11E-04  2.04E-04  2.11E-04  5.83E-04  4.53E-04  2.63E-04 -3.23E-05  2.21E-04  2.96E-03
          2.13E-03
 OM44
+        1.06E-04  1.38E-04  1.28E-04  2.23E-04  1.42E-04  1.48E-04  3.58E-04  2.95E-04  2.19E-04 -1.43E-05  2.50E-04  1.56E-03
          1.32E-03  1.58E-03
 SG11
+        5.85E-06  1.02E-05 -7.81E-06 -1.72E-05 -3.61E-05 -4.18E-05 -8.30E-05 -6.24E-05 -7.70E-05  1.73E-05 -2.54E-05 -3.75E-04
         -2.21E-04 -1.55E-04  6.84E-05

 ********************               FIRST ORDER CONDITIONAL ESTIMATION WITH INTERACTION              ********************
 ********************                          CORRELATION MATRIX OF ESTIMATE                        ********************

            TH 1      TH 2      TH 3      TH 4      OM11      OM12      OM13      OM14      OM22      OM23      OM24      OM33
             OM34      OM44      SG11
 TH 1
+        4.32E-02
 TH 2
+        1.19E-01  4.78E-02
 TH 3
+        1.90E-01  7.00E-02  7.05E-02
 TH 4
+        1.09E-01  1.32E-01  5.40E-01  5.18E-02
 OM11
+        6.30E-02  1.07E-01  1.05E-01  1.18E-01  2.71E-02
 OM12
+        8.55E-02  1.27E-01  1.73E-01  1.54E-01  2.40E-01  2.14E-02
 OM13
+        8.48E-02  1.29E-01  1.78E-02  1.36E-01  3.34E-01  2.43E-01  3.05E-02
 OM14
+        9.09E-02  1.16E-01  1.40E-01  1.73E-01  2.30E-01  2.85E-01  5.90E-01  2.39E-02
 OM22
+       -2.82E-03  2.47E-02 -1.12E-01 -4.43E-02  2.38E-02  1.44E-01  1.11E-01  9.01E-02  3.15E-02
 OM23
+        3.69E-02  5.69E-02  3.33E-01  1.35E-01  6.25E-02  2.22E-01 -5.56E-02  2.65E-02 -4.50E-02  3.54E-02
 OM24
+        3.06E-02 -1.23E-02  1.90E-01  1.51E-01  5.88E-02  1.14E-01  7.35E-02  1.78E-01  1.87E-01  4.04E-01  2.35E-02
 OM33
+        7.60E-02  4.66E-03  1.65E-01  1.72E-01  1.70E-01  2.13E-01  4.57E-01  3.64E-01  1.58E-01 -2.01E-03  1.36E-01  7.82E-02
 OM34
+        7.88E-02  3.05E-02  1.08E-01  1.30E-01  1.63E-01  2.13E-01  4.15E-01  4.11E-01  1.81E-01 -1.98E-02  2.04E-01  8.19E-01
          4.61E-02
 OM44
+        6.17E-02  7.28E-02  4.57E-02  1.09E-01  1.31E-01  1.74E-01  2.95E-01  3.11E-01  1.75E-01 -1.02E-02  2.68E-01  5.03E-01
          7.22E-01  3.97E-02
 SG11
+        1.64E-02  2.57E-02 -1.34E-02 -4.02E-02 -1.61E-01 -2.36E-01 -3.29E-01 -3.16E-01 -2.96E-01  5.89E-02 -1.31E-01 -5.79E-01
         -5.80E-01 -4.72E-01  8.27E-03
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
 ********************               FIRST ORDER CONDITIONAL ESTIMATION WITH INTERACTION              ********************
 ********************                      EIGENVALUES OF COR MATRIX OF ESTIMATE                     ********************

             1         2         3         4         5         6         7         8         9        10        11        12
             13        14        15
         1.19E-01  3.30E-01  3.88E-01  4.32E-01  4.59E-01  5.74E-01  7.53E-01  8.12E-01  8.66E-01  8.79E-01  1.00E+00  1.17E+00
          1.36E+00  1.94E+00  3.91E+00
 Elapsed finaloutput time in seconds:     0.05
 #CPUT: Total CPU Time in Seconds,       10.374
