Thu Nov 21 21:34:28 EST 2024
$PROBLEM    033 with a lot of extra parameters for NWPRI testing
$INPUT      ROW ID NOMTIME TIME EVID CMT AMT DV FLAG STUDY BLQ CYCLE
            DOSE2 PART PROFDAY PROFTIME WEIGHTB eff0
$DATA      xgxr2.csv IGNORE=@ IGNORE=(FLAG.NE.0) IGNORE(DOSE2.LT.30)
$SUBROUTINE ADVAN4 TRANS4
$PK
LTVKA=THETA(1)*DOSE2**(-.05)
LTVV2=THETA(2)
LTVCL=THETA(3)
LTVV3=THETA(4)
LTVQ=THETA(5)

MU_1=LTVKA
KA=EXP(MU_1+ETA(1))
MU_2=LTVV2
V2=EXP(MU_2+ETA(2))
MU_3=LTVCL
IF(TIME.GT.20) MU_3= LTVCL+THETA(32)
CL=EXP(MU_3+ETA(3))
MU_4=LTVV3
V3=EXP(MU_4+ETA(4))
MU_5 = LTVQ
Q =EXP(MU_5+ETA(5))
S2=V2

$ERROR
  IPRED=F
  IRES=DV-IPRED

  IF (IPRED.GT.1) THEN
    W = SQRT(IPRED**2*SIGMA(1,1) + SIGMA(2,2))
  ELSE
    W=1
  ENDIF

  IWRES=IRES/W
  Y=F+F*ERR(1)+ERR(2)

;-----------------------INITIAL ESTIMATES---------------------------------

$THETA  .1 ; LTVKA
$THETA  3 ; LTVV2
$THETA  1 ; LTVCL
$THETA  4 ; LTVV3
$THETA  -1 ; LTVQ
;; extra parameters
$THETA  .1 FIX ; LTVKA_
$THETA  3 FIX ; LTVV2_
$THETA  1 FIX ; LTVCL_
$THETA  4 FIX ; LTVV3_
$THETA  -1 FIX ; LTVQ_
$THETA  .1 FIX ; LTVKA__
$THETA  3 FIX ; LTVV2__
$THETA  1 FIX ; LTVCL__
$THETA  4 FIX ; LTVV3__
$THETA  -1 FIX ; LTVQ__
$THETA  .1 FIX ; LTVKA___
$THETA  3 FIX ; LTVV2___
$THETA  1 FIX ; LTVCL___
$THETA  4 FIX ; LTVV3___
$THETA  -1 FIX ; LTVQ___
$THETA  .1 FIX ; LTVKA____
$THETA  3 FIX ; LTVV2____
$THETA  1 FIX ; LTVCL____
$THETA  4 FIX ; LTVV3____
$THETA  -1 FIX ; LTVQ____
$THETA  .1 FIX ; LTVKA_____
$THETA  3 FIX ; LTVV2_____
$THETA  1 FIX ; LTVCL_____
$THETA  4 FIX ; LTVV3_____
$THETA  -1 FIX ; LTVQ_____
$THETA  .1 FIX ; LTVKA______
$THETA  3 FIX ; LTVV2______
$THETA  1 FIX ; LTVCL______
$THETA  4 FIX ; LTVV3______
$THETA  -1 FIX ; LTVQ______
$OMEGA  0  FIX
$OMEGA  0.1
$OMEGA  0.1
$OMEGA  0  FIX
$OMEGA  0  FIX
$SIGMA  0.1
$SIGMA  0  FIX
;; $ESTIMATION METHOD=1 POSTHOC INTER MAXEVAL=9999 NSIG=2 SIGL=9
;;            PRINT=10 NOABORT MSFO=xgxr032.msf
$ESTIMATION METHOD=SAEM INTERACTION NOABORT NBURN=1000 NITER=1000
            CTYPE=3 MAX=99999 NSIG=3 SEED=3442 PRINT=10 RANMETHOD=P
            MSFO=xgxr233.msf
$ESTIMATION METHOD=IMP INTERACTION EONLY=1 NITER=20 PRINT=1
            ISAMPLE=5000 RANMETHOD=P
$COVARIANCE PRINT=E
$TABLE      ROW KA V2 V3 CL Q PRED IPRED Y NOPRINT
            FILE=xgxr233_res.txt
$TABLE      ETAS(1:LAST) NOAPPEND NOPRINT FILE=xgxr233_etas.txt

NM-TRAN MESSAGES
 WARNINGS AND ERRORS (IF ANY) FOR PROBLEM    1
 (WARNING  2) NM-TRAN INFERS THAT THE DATA ARE POPULATION.
 (WARNING  79) SIGMA IS USED ON THE RIGHT. WITH A SUBSEQUENT RUN, IF AN
 INITIAL ESTIMATE OF A DIAGONAL BLOCK OF SIGMA IS TO BE COMPUTED BY
 NONMEM, THAT BLOCK WILL BE SET TO AN IDENTITY MATRIX DURING THAT
 COMPUTATION. THIS COULD LEAD TO AN ARITHMETIC EXCEPTION.*
 (MU_WARNING 8) MU_003: SHOULD NOT BE DEFINED CONDITIONALLY.
 (MU_WARNING 2) MU_003: SHOULD BE DEFINED ONLY ONCE.
 (MU_WARNING 26) DATA ITEM(S) USED IN DEFINITION OF MU_(S) SHOULD BE CONSTANT FOR INDIV. REC.:
  DOSE2
 * THE MAXIMUM NUMBER OF WARNINGS OF ONE OR MORE TYPES WAS REACHED.
 IT IS POSSIBLE THAT SOME WARNING MESSAGES WERE SUPPRESSED.

1NONLINEAR MIXED EFFECTS MODEL PROGRAM (NONMEM) VERSION 7.5.0
 ORIGINALLY DEVELOPED BY STUART BEAL, LEWIS SHEINER, AND ALISON BOECKMANN
 CURRENT DEVELOPERS ARE ROBERT BAUER, ICON DEVELOPMENT SOLUTIONS,
 AND ALISON BOECKMANN. IMPLEMENTATION, EFFICIENCY, AND STANDARDIZATION
 PERFORMED BY NOUS INFOSYSTEMS.
 PROBLEM NO.:         1
 033 with a lot of extra parameters for NWPRI testing
 TOT. NO. OF OBS RECS:      641
 TOT. NO. OF INDIVIDUALS:       90
 TWO COMPARTMENT MODEL WITH FIRST-ORDER ABSORPTION (ADVAN4)
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 #TBLN:      1
 #METH: Stochastic Approximation Expectation-Maximization
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
 #TERM:
 STOCHASTIC PORTION WAS COMPLETED
 REDUCED STOCHASTIC PORTION WAS COMPLETED

 ETABAR IS THE ARITHMETIC MEAN OF THE ETA-ESTIMATES,
 AND THE P-VALUE IS GIVEN FOR THE NULL HYPOTHESIS THAT THE TRUE MEAN IS 0.

 ETABAR:         0.0000E+00 -6.9552E-06  2.8289E-05  0.0000E+00  0.0000E+00
 SE:             0.0000E+00  3.9974E-02  1.4549E-01  0.0000E+00  0.0000E+00
 N:                       0          90          90           0           0

 P VAL.:         1.0000E+00  9.9986E-01  9.9984E-01  1.0000E+00  1.0000E+00

 ETASHRINKSD(%)  0.0000E+00  1.0717E+01  2.0244E+01  0.0000E+00  0.0000E+00
 ETASHRINKVR(%)  0.0000E+00  2.0285E+01  3.6390E+01  0.0000E+00  0.0000E+00
 EBVSHRINKSD(%)  0.0000E+00  1.0723E+01  2.0241E+01  0.0000E+00  0.0000E+00
 EBVSHRINKVR(%)  0.0000E+00  2.0295E+01  3.6385E+01  0.0000E+00  0.0000E+00
 RELATIVEINF(%)  0.0000E+00  0.0000E+00  0.0000E+00  0.0000E+00  0.0000E+00
 EPSSHRINKSD(%)  9.4606E+00  1.0000E+02
 EPSSHRINKVR(%)  1.8026E+01  1.0000E+02


 TOTAL DATA POINTS NORMALLY DISTRIBUTED (N):          641
 N*LOG(2PI) CONSTANT TO OBJECTIVE FUNCTION:    1178.0791995683903
 OBJECTIVE FUNCTION VALUE WITHOUT CONSTANT:   -1709.7986330091553
 OBJECTIVE FUNCTION VALUE WITH CONSTANT:      -531.71943344076499
 REPORTED OBJECTIVE FUNCTION DOES NOT CONTAIN CONSTANT

 TOTAL EFFECTIVE ETAS (NIND*NETA):                           180
 NIND*NETA*LOG(2PI) CONSTANT TO OBJECTIVE FUNCTION:    330.81787195368219
 OBJECTIVE FUNCTION VALUE WITHOUT CONSTANT:   -1709.7986330091553
 OBJECTIVE FUNCTION VALUE WITH CONSTANT:      -1378.9807610554731
 REPORTED OBJECTIVE FUNCTION DOES NOT CONTAIN CONSTANT


 #TERE:
 Elapsed estimation  time in seconds:    31.97
 Elapsed covariance  time in seconds:     0.01

 ********************                STOCHASTIC APPROXIMATION EXPECTATION-MAXIMIZATION               ********************
 #OBJT:**************                        FINAL VALUE OF LIKELIHOOD FUNCTION                      ********************
 #OBJV:********************************************    -1709.799       **************************************************

 ********************                STOCHASTIC APPROXIMATION EXPECTATION-MAXIMIZATION               ********************
 ********************                             FINAL PARAMETER ESTIMATE                           ********************

 THETA - VECTOR OF FIXED EFFECTS PARAMETERS   *********
         TH 1      TH 2      TH 3      TH 4      TH 5      TH 6      TH 7      TH 8      TH 9      TH10      TH11      TH12
          TH13      TH14      TH15      TH16      TH17      TH18      TH19      TH20      TH21      TH22      TH23      TH24
         TH25      TH26      TH27      TH28      TH29      TH30      TH31      TH32      TH33      TH34      TH35
         9.89E-01  4.33E+00  3.00E-01  6.51E+00  2.91E+00  1.00E-01  3.00E+00  1.00E+00  4.00E+00 -1.00E+00  1.00E-01  3.00E+00
          1.00E+00  4.00E+00 -1.00E+00  1.00E-01  3.00E+00  1.00E+00  4.00E+00 -1.00E+00  1.00E-01  3.00E+00  1.00E+00  4.00E+00
        -1.00E+00  1.00E-01  3.00E+00  1.00E+00  4.00E+00 -1.00E+00  1.00E-01  3.00E+00  1.00E+00  4.00E+00 -1.00E+00

 OMEGA - COV MATRIX FOR RANDOM EFFECTS - ETAS  ********
         ETA1      ETA2      ETA3      ETA4      ETA5
 ETA1
+        0.00E+00
 ETA2
+        0.00E+00  1.82E-01
 ETA3
+        0.00E+00  0.00E+00  3.03E+00
 ETA4
+        0.00E+00  0.00E+00  0.00E+00  0.00E+00
 ETA5
+        0.00E+00  0.00E+00  0.00E+00  0.00E+00  0.00E+00

 SIGMA - COV MATRIX FOR RANDOM EFFECTS - EPSILONS  ****
         EPS1      EPS2
 EPS1
+        1.34E-01
 EPS2
+        0.00E+00  0.00E+00

 OMEGA - CORR MATRIX FOR RANDOM EFFECTS - ETAS  *******
         ETA1      ETA2      ETA3      ETA4      ETA5
 ETA1
+        0.00E+00
 ETA2
+        0.00E+00  4.27E-01
 ETA3
+        0.00E+00  0.00E+00  1.74E+00
 ETA4
+        0.00E+00  0.00E+00  0.00E+00  0.00E+00
 ETA5
+        0.00E+00  0.00E+00  0.00E+00  0.00E+00  0.00E+00

 SIGMA - CORR MATRIX FOR RANDOM EFFECTS - EPSILONS  ***
         EPS1      EPS2
 EPS1
+        3.65E-01
 EPS2
+        0.00E+00  0.00E+00

 ********************                STOCHASTIC APPROXIMATION EXPECTATION-MAXIMIZATION               ********************
 ********************                          STANDARD ERROR OF ESTIMATE (S)                        ********************

 THETA - VECTOR OF FIXED EFFECTS PARAMETERS   *********
         TH 1      TH 2      TH 3      TH 4      TH 5      TH 6      TH 7      TH 8      TH 9      TH10      TH11      TH12
          TH13      TH14      TH15      TH16      TH17      TH18      TH19      TH20      TH21      TH22      TH23      TH24
         TH25      TH26      TH27      TH28      TH29      TH30      TH31      TH32      TH33      TH34      TH35
         8.50E-02  6.51E-02  3.47E-01  7.51E-02  3.56E-02  0.00E+00  0.00E+00  0.00E+00  0.00E+00  0.00E+00  0.00E+00  0.00E+00
          0.00E+00  0.00E+00  0.00E+00  0.00E+00  0.00E+00  0.00E+00  0.00E+00  0.00E+00  0.00E+00  0.00E+00  0.00E+00  0.00E+00
         0.00E+00  0.00E+00  0.00E+00  0.00E+00  0.00E+00  0.00E+00  0.00E+00  0.00E+00  0.00E+00  0.00E+00  0.00E+00

 OMEGA - COV MATRIX FOR RANDOM EFFECTS - ETAS  ********
         ETA1      ETA2      ETA3      ETA4      ETA5
 ETA1
+        0.00E+00
 ETA2
+        0.00E+00  3.69E-02
 ETA3
+        0.00E+00  0.00E+00  1.46E+00
 ETA4
+        0.00E+00  0.00E+00  0.00E+00  0.00E+00
 ETA5
+        0.00E+00  0.00E+00  0.00E+00  0.00E+00  0.00E+00

 SIGMA - COV MATRIX FOR RANDOM EFFECTS - EPSILONS  ****
         EPS1      EPS2
 EPS1
+        8.74E-03
 EPS2
+        0.00E+00  0.00E+00

 OMEGA - CORR MATRIX FOR RANDOM EFFECTS - ETAS  *******
         ETA1      ETA2      ETA3      ETA4      ETA5
 ETA1
+       .........
 ETA2
+       .........  4.32E-02
 ETA3
+       ......... .........  4.20E-01
 ETA4
+       ......... ......... ......... .........
 ETA5
+       ......... ......... ......... ......... .........

 SIGMA - CORR MATRIX FOR RANDOM EFFECTS - EPSILONS  ***
         EPS1      EPS2
 EPS1
+        1.20E-02
 EPS2
+       ......... .........
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
 ********************                STOCHASTIC APPROXIMATION EXPECTATION-MAXIMIZATION               ********************
 ********************                    EIGENVALUES OF COR MATRIX OF ESTIMATE (S)                   ********************

             1         2         3         4         5         6         7         8
         4.23E-02  3.46E-01  4.19E-01  7.78E-01  1.02E+00  1.19E+00  1.91E+00  2.29E+00
 #TBLN:      2
 #METH: Objective Function Evaluation by Importance Sampling
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
 #TERM:
 EXPECTATION ONLY PROCESS WAS COMPLETED

 ETABAR IS THE ARITHMETIC MEAN OF THE ETA-ESTIMATES,
 AND THE P-VALUE IS GIVEN FOR THE NULL HYPOTHESIS THAT THE TRUE MEAN IS 0.

 ETABAR:         0.0000E+00  2.3835E-03 -1.1744E-02  0.0000E+00  0.0000E+00
 SE:             0.0000E+00  3.9859E-02  1.4693E-01  0.0000E+00  0.0000E+00
 N:                       0          90          90           0           0

 P VAL.:         1.0000E+00  9.5232E-01  9.3629E-01  1.0000E+00  1.0000E+00

 ETASHRINKSD(%)  0.0000E+00  1.0973E+01  1.9459E+01  0.0000E+00  0.0000E+00
 ETASHRINKVR(%)  0.0000E+00  2.0743E+01  3.5131E+01  0.0000E+00  0.0000E+00
 EBVSHRINKSD(%)  0.0000E+00  1.0823E+01  2.0125E+01  0.0000E+00  0.0000E+00
 EBVSHRINKVR(%)  0.0000E+00  2.0475E+01  3.6200E+01  0.0000E+00  0.0000E+00
 RELATIVEINF(%)  0.0000E+00  0.0000E+00  0.0000E+00  0.0000E+00  0.0000E+00
 EPSSHRINKSD(%)  9.4978E+00  1.0000E+02
 EPSSHRINKVR(%)  1.8093E+01  1.0000E+02


 TOTAL DATA POINTS NORMALLY DISTRIBUTED (N):          641
 N*LOG(2PI) CONSTANT TO OBJECTIVE FUNCTION:    1178.0791995683903
 OBJECTIVE FUNCTION VALUE WITHOUT CONSTANT:   -1450.7489311635568
 OBJECTIVE FUNCTION VALUE WITH CONSTANT:      -272.66973159516647
 REPORTED OBJECTIVE FUNCTION DOES NOT CONTAIN CONSTANT

 TOTAL EFFECTIVE ETAS (NIND*NETA):                           180


 #TERE:
 Elapsed estimation  time in seconds:    41.45
 Elapsed covariance  time in seconds:   209.88

 ********************               OBJECTIVE FUNCTION EVALUATION BY IMPORTANCE SAMPLING             ********************
 #OBJT:**************                        FINAL VALUE OF OBJECTIVE FUNCTION                       ********************
 #OBJV:********************************************    -1450.749       **************************************************

 ********************               OBJECTIVE FUNCTION EVALUATION BY IMPORTANCE SAMPLING             ********************
 ********************                             FINAL PARAMETER ESTIMATE                           ********************

 THETA - VECTOR OF FIXED EFFECTS PARAMETERS   *********
         TH 1      TH 2      TH 3      TH 4      TH 5      TH 6      TH 7      TH 8      TH 9      TH10      TH11      TH12
          TH13      TH14      TH15      TH16      TH17      TH18      TH19      TH20      TH21      TH22      TH23      TH24
         TH25      TH26      TH27      TH28      TH29      TH30      TH31      TH32      TH33      TH34      TH35
         9.89E-01  4.33E+00  3.00E-01  6.51E+00  2.91E+00  1.00E-01  3.00E+00  1.00E+00  4.00E+00 -1.00E+00  1.00E-01  3.00E+00
          1.00E+00  4.00E+00 -1.00E+00  1.00E-01  3.00E+00  1.00E+00  4.00E+00 -1.00E+00  1.00E-01  3.00E+00  1.00E+00  4.00E+00
        -1.00E+00  1.00E-01  3.00E+00  1.00E+00  4.00E+00 -1.00E+00  1.00E-01  3.00E+00  1.00E+00  4.00E+00 -1.00E+00

 OMEGA - COV MATRIX FOR RANDOM EFFECTS - ETAS  ********
         ETA1      ETA2      ETA3      ETA4      ETA5
 ETA1
+        0.00E+00
 ETA2
+        0.00E+00  1.82E-01
 ETA3
+        0.00E+00  0.00E+00  3.03E+00
 ETA4
+        0.00E+00  0.00E+00  0.00E+00  0.00E+00
 ETA5
+        0.00E+00  0.00E+00  0.00E+00  0.00E+00  0.00E+00

 SIGMA - COV MATRIX FOR RANDOM EFFECTS - EPSILONS  ****
         EPS1      EPS2
 EPS1
+        1.34E-01
 EPS2
+        0.00E+00  0.00E+00

 OMEGA - CORR MATRIX FOR RANDOM EFFECTS - ETAS  *******
         ETA1      ETA2      ETA3      ETA4      ETA5
 ETA1
+        0.00E+00
 ETA2
+        0.00E+00  4.27E-01
 ETA3
+        0.00E+00  0.00E+00  1.74E+00
 ETA4
+        0.00E+00  0.00E+00  0.00E+00  0.00E+00
 ETA5
+        0.00E+00  0.00E+00  0.00E+00  0.00E+00  0.00E+00

 SIGMA - CORR MATRIX FOR RANDOM EFFECTS - EPSILONS  ***
         EPS1      EPS2
 EPS1
+        3.65E-01
 EPS2
+        0.00E+00  0.00E+00

 ********************               OBJECTIVE FUNCTION EVALUATION BY IMPORTANCE SAMPLING             ********************
 ********************                         STANDARD ERROR OF ESTIMATE (RSR)                       ********************

 THETA - VECTOR OF FIXED EFFECTS PARAMETERS   *********
         TH 1      TH 2      TH 3      TH 4      TH 5      TH 6      TH 7      TH 8      TH 9      TH10      TH11      TH12
          TH13      TH14      TH15      TH16      TH17      TH18      TH19      TH20      TH21      TH22      TH23      TH24
         TH25      TH26      TH27      TH28      TH29      TH30      TH31      TH32      TH33      TH34      TH35
         9.58E-02  6.26E-02  3.49E-01  1.83E-01  4.09E-02  0.00E+00  0.00E+00  0.00E+00  0.00E+00  0.00E+00  0.00E+00  0.00E+00
          0.00E+00  0.00E+00  0.00E+00  0.00E+00  0.00E+00  0.00E+00  0.00E+00  0.00E+00  0.00E+00  0.00E+00  0.00E+00  0.00E+00
         0.00E+00  0.00E+00  0.00E+00  0.00E+00  0.00E+00  0.00E+00  0.00E+00  0.00E+00  0.00E+00  0.00E+00  0.00E+00

 OMEGA - COV MATRIX FOR RANDOM EFFECTS - ETAS  ********
         ETA1      ETA2      ETA3      ETA4      ETA5
 ETA1
+        0.00E+00
 ETA2
+        0.00E+00  3.46E-02
 ETA3
+        0.00E+00  0.00E+00  5.29E-01
 ETA4
+        0.00E+00  0.00E+00  0.00E+00  0.00E+00
 ETA5
+        0.00E+00  0.00E+00  0.00E+00  0.00E+00  0.00E+00

 SIGMA - COV MATRIX FOR RANDOM EFFECTS - EPSILONS  ****
         EPS1      EPS2
 EPS1
+        1.14E-02
 EPS2
+        0.00E+00  0.00E+00

 OMEGA - CORR MATRIX FOR RANDOM EFFECTS - ETAS  *******
         ETA1      ETA2      ETA3      ETA4      ETA5
 ETA1
+       .........
 ETA2
+       .........  4.06E-02
 ETA3
+       ......... .........  1.52E-01
 ETA4
+       ......... ......... ......... .........
 ETA5
+       ......... ......... ......... ......... .........

 SIGMA - CORR MATRIX FOR RANDOM EFFECTS - EPSILONS  ***
         EPS1      EPS2
 EPS1
+        1.56E-02
 EPS2
+       ......... .........
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
 ********************               OBJECTIVE FUNCTION EVALUATION BY IMPORTANCE SAMPLING             ********************
 ********************                   EIGENVALUES OF COR MATRIX OF ESTIMATE (RSR)                  ********************

             1         2         3         4         5         6         7         8
         1.33E-01  2.85E-01  3.67E-01  6.75E-01  9.90E-01  1.08E+00  1.63E+00  2.84E+00
 Elapsed postprocess time in seconds:     0.05
 Elapsed finaloutput time in seconds:     0.02
 #CPUT: Total CPU Time in Seconds,      283.555
