$PROBLEM    033 with a lot of extra parameters for NWPRI testing

$INPUT ROW ID NOMTIME TIME EVID CMT AMT DV FLAG STUDY
BLQ CYCLE DOSE2 PART PROFDAY PROFTIME WEIGHTB eff0

$DATA     ../data/xgxr2.csv IGNORE=@ IGNORE=(FLAG.NE.0) IGNORE(DOSE2.LT.30)

$SUBROUTINE ADVAN4 TRANS4

$PK
LTVKA=THETA(1)*DOSE2**(-.05)
LTVV2=THETA(2)
LTVCL=THETA(3)
LTVV3=THETA(4)
LTVQ=THETA(5)

MU_1=LTVKA
KA=EXP(MU_1+ETA(1))
MU_2=LTVV2
V2=EXP(MU_2+ETA(2))
MU_3=LTVCL
IF(TIME.GT.20) MU_3= LTVCL+THETA(32)
CL=EXP(MU_3+ETA(3))
MU_4=LTVV3
V3=EXP(MU_4+ETA(4))
MU_5 = LTVQ
Q =EXP(MU_5+ETA(5))
S2=V2


$ERROR
  IPRED=F
  IRES=DV-IPRED

  IF (IPRED.GT.1) THEN
    W = SQRT(IPRED**2*SIGMA(1,1) + SIGMA(2,2))
  ELSE
    W=1
  ENDIF

  IWRES=IRES/W
  Y=F+F*ERR(1)+ERR(2)

;-----------------------INITIAL ESTIMATES---------------------------------


$THETA  (.1)             ; LTVKA
$THETA  (3)             ; LTVV2
$THETA  (1)             ; LTVCL
$THETA  (4)             ; LTVV3
$THETA  (-1)             ; LTVQ
;; extra parameters
$THETA  (.1) FIX        ; LTVKA
$THETA  (3)  FIX        ; LTVV2
$THETA  (1)  FIX        ; LTVCL
$THETA  (4)  FIX        ; LTVV3
$THETA  (-1) FIX        ; LTVQ
$THETA  (.1) FIX        ; LTVKA
$THETA  (3)  FIX        ; LTVV2
$THETA  (1)  FIX        ; LTVCL
$THETA  (4)  FIX        ; LTVV3
$THETA  (-1) FIX        ; LTVQ
$THETA  (.1) FIX        ; LTVKA
$THETA  (3)  FIX        ; LTVV2
$THETA  (1)  FIX        ; LTVCL
$THETA  (4)  FIX        ; LTVV3
$THETA  (-1) FIX        ; LTVQ
$THETA  (.1) FIX        ; LTVKA
$THETA  (3)  FIX        ; LTVV2
$THETA  (1)  FIX        ; LTVCL
$THETA  (4)  FIX        ; LTVV3
$THETA  (-1) FIX        ; LTVQ
$THETA  (.1) FIX        ; LTVKA
$THETA  (3)  FIX        ; LTVV2
$THETA  (1)  FIX        ; LTVCL
$THETA  (4)  FIX        ; LTVV3
$THETA  (-1) FIX        ; LTVQ
$THETA  (.1) FIX       ; LTVKA
$THETA  (3)  FIX        ; LTVV2
$THETA  (1)  FIX        ; LTVCL
$THETA  (4)  FIX        ; LTVV3
$THETA  (-1) FIX        ; LTVQ


$OMEGA 0 FIX
$OMEGA 0.1
$OMEGA 0.1
$OMEGA 0 FIX
$OMEGA 0 FIX

$SIGMA 0.1
$SIGMA 0 FIX

;; $ESTIMATION METHOD=1 POSTHOC INTER MAXEVAL=9999 NSIG=2 SIGL=9
;;            PRINT=10 NOABORT MSFO=xgxr032.msf
$ESTIMATION METHOD=SAEM INTERACTION NOABORT NBURN=1000 NITER=1000 CTYPE=3 MAX=99999 NSIG=3 SEED=3442 PRINT=10 RANMETHOD=P MSFO=xgxr233.msf

$ESTIMATION METHOD=IMP INTERACTION EONLY=1 NITER=20 PRINT=1 ISAMPLE=5000 RANMETHOD=P

$COV PRINT=E

$TABLE ROW KA V2 V3 CL Q PRED IPRED Y NOPRINT FILE=xgxr233_res.txt
$TABLE ETAS(1:LAST) NOAPPEND NOPRINT FILE=xgxr233_etas.txt
