Sun Nov 24 11:47:24 EST 2024
$PROBLEM    033 with blocks,estimates and fixes in OMEGA
$INPUT      ROW ID NOMTIME TIME EVID CMT AMT DV FLAG STUDY BLQ CYCLE
            DOSE2 PART PROFDAY PROFTIME WEIGHTB eff0
$DATA      xgxr2.csv IGNORE=@ IGNORE=(FLAG.NE.0) IGNORE(DOSE2.LT.30)
$SUBROUTINE ADVAN4 TRANS4
$PK
LTVKA=THETA(1)*DOSE2**(-.05)
LTVV2=THETA(2)
LTVCL=THETA(3)
LTVCL2=THETA(6)
LTVV3=THETA(4)
LTVQ=THETA(5)

MU_1=LTVKA
KA=EXP(MU_1+ETA(1))
MU_2=LTVV2
V2=EXP(MU_2+ETA(2))
MU_3=LTVCL
CL=EXP(MU_3+ETA(3))
MU_6=LTVCL2
IF(WEIGHTB.GT.80) CL=EXP(MU_6+ETA(6))
MU_4=LTVV3
V3=EXP(MU_4+ETA(4))
MU_5 = LTVQ
Q =EXP(MU_5+ETA(5))
S2=V2

$ERROR
  IPRED=F
  IRES=DV-IPRED

  IF (IPRED.GT.1) THEN
    W = SQRT(IPRED**2*SIGMA(1,1) + SIGMA(2,2))
  ELSE
    W=1
  ENDIF

  IWRES=IRES/W
  Y=F+F*ERR(1)+ERR(2)

;-----------------------INITIAL ESTIMATES---------------------------------
$THETA  .1 ; LTVKA
$THETA  3 ; LTVV2
$THETA  1 ; LTVCL
$THETA  4 ; LTVV3
$THETA  -1 ; LTVQ
$THETA  -.5 ; LTCL2
$OMEGA  BLOCK(2)
 0.1
 .01 0.1
$OMEGA  0.1
$OMEGA  BLOCK(2)
 0.1
 .01 0.1
$OMEGA  .1
$OMEGA  0  FIX
$SIGMA  0.1
$SIGMA  0  FIX
;; $ESTIMATION METHOD=1 POSTHOC INTER MAXEVAL=9999 NSIG=2 SIGL=9
;;            PRINT=10 NOABORT MSFO=xgxr032.msf
$ESTIMATION METHOD=SAEM INTERACTION NOABORT NBURN=1000 NITER=1000
            CTYPE=3 MAX=99999 NSIG=3 SEED=3442 PRINT=10 RANMETHOD=P
            MSFO=xgxr235.msf
$ESTIMATION METHOD=IMP INTERACTION EONLY=1 NITER=20 PRINT=1
            ISAMPLE=5000 RANMETHOD=P
$COVARIANCE PRINT=E MATRIX=R UNCONDITIONAL
$TABLE      ROW KA V2 V3 CL Q PRED IPRED Y NOPRINT
            FILE=xgxr235_res.txt
$TABLE      ETAS(1:LAST) NOAPPEND NOPRINT FILE=xgxr235_etas.txt

NM-TRAN MESSAGES
 WARNINGS AND ERRORS (IF ANY) FOR PROBLEM    1
 (WARNING  2) NM-TRAN INFERS THAT THE DATA ARE POPULATION.
 (WARNING  79) SIGMA IS USED ON THE RIGHT. WITH A SUBSEQUENT RUN, IF AN
 INITIAL ESTIMATE OF A DIAGONAL BLOCK OF SIGMA IS TO BE COMPUTED BY
 NONMEM, THAT BLOCK WILL BE SET TO AN IDENTITY MATRIX DURING THAT
 COMPUTATION. THIS COULD LEAD TO AN ARITHMETIC EXCEPTION.*
 (MU_WARNING 26) DATA ITEM(S) USED IN DEFINITION OF MU_(S) SHOULD BE CONSTANT FOR INDIV. REC.:
  DOSE2
 * THE MAXIMUM NUMBER OF WARNINGS OF ONE OR MORE TYPES WAS REACHED.
 IT IS POSSIBLE THAT SOME WARNING MESSAGES WERE SUPPRESSED.

1NONLINEAR MIXED EFFECTS MODEL PROGRAM (NONMEM) VERSION 7.5.0
 ORIGINALLY DEVELOPED BY STUART BEAL, LEWIS SHEINER, AND ALISON BOECKMANN
 CURRENT DEVELOPERS ARE ROBERT BAUER, ICON DEVELOPMENT SOLUTIONS,
 AND ALISON BOECKMANN. IMPLEMENTATION, EFFICIENCY, AND STANDARDIZATION
 PERFORMED BY NOUS INFOSYSTEMS.
 PROBLEM NO.:         1
 033 with blocks,estimates and fixes in OMEGA
 TOT. NO. OF OBS RECS:      641
 TOT. NO. OF INDIVIDUALS:       90
 TWO COMPARTMENT MODEL WITH FIRST-ORDER ABSORPTION (ADVAN4)
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 #TBLN:      1
 #METH: Stochastic Approximation Expectation-Maximization
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
 #TERM:
 STOCHASTIC PORTION WAS NOT COMPLETED
 REDUCED STOCHASTIC PORTION WAS COMPLETED

 ETABAR IS THE ARITHMETIC MEAN OF THE ETA-ESTIMATES,
 AND THE P-VALUE IS GIVEN FOR THE NULL HYPOTHESIS THAT THE TRUE MEAN IS 0.

 ETABAR:         1.0800E-03 -1.9141E-02  6.1371E-07 -5.3540E-05 -9.7203E-06  9.9025E-06  0.0000E+00
 SE:             2.2401E-03  3.9701E-02  3.9026E-05  2.2677E-02  4.0715E-03  5.0879E-02  0.0000E+00
 N:                      90          90          90          90          90          90           0

 P VAL.:         6.2971E-01  6.2972E-01  9.8745E-01  9.9812E-01  9.9810E-01  9.9984E-01  1.0000E+00

 ETASHRINKSD(%)  7.4003E+00  7.4001E+00  9.7077E+01  5.9853E+01  5.9854E+01  1.5098E+01  0.0000E+00
 ETASHRINKVR(%)  1.4253E+01  1.4253E+01  9.9915E+01  8.3882E+01  8.3883E+01  2.7916E+01  0.0000E+00
 EBVSHRINKSD(%)  7.2870E+00  7.2867E+00  9.6821E+01  5.9860E+01  5.9862E+01  1.5102E+01  0.0000E+00
 EBVSHRINKVR(%)  1.4043E+01  1.4043E+01  9.9899E+01  8.3888E+01  8.3889E+01  2.7923E+01  0.0000E+00
 RELATIVEINF(%)  0.0000E+00  0.0000E+00  0.0000E+00  0.0000E+00  0.0000E+00  0.0000E+00  0.0000E+00
 EPSSHRINKSD(%)  1.3245E+01  1.0000E+02
 EPSSHRINKVR(%)  2.4735E+01  1.0000E+02


 TOTAL DATA POINTS NORMALLY DISTRIBUTED (N):          641
 N*LOG(2PI) CONSTANT TO OBJECTIVE FUNCTION:    1178.0791995683903
 OBJECTIVE FUNCTION VALUE WITHOUT CONSTANT:   -5839.2016908810911
 OBJECTIVE FUNCTION VALUE WITH CONSTANT:      -4661.1224913127007
 REPORTED OBJECTIVE FUNCTION DOES NOT CONTAIN CONSTANT

 TOTAL EFFECTIVE ETAS (NIND*NETA):                           540
 NIND*NETA*LOG(2PI) CONSTANT TO OBJECTIVE FUNCTION:    992.45361586104650
 OBJECTIVE FUNCTION VALUE WITHOUT CONSTANT:   -5839.2016908810911
 OBJECTIVE FUNCTION VALUE WITH CONSTANT:      -4846.7480750200448
 REPORTED OBJECTIVE FUNCTION DOES NOT CONTAIN CONSTANT


 #TERE:
 Elapsed estimation  time in seconds:    73.38
 Elapsed covariance  time in seconds:     0.01

 ********************                STOCHASTIC APPROXIMATION EXPECTATION-MAXIMIZATION               ********************
 #OBJT:**************                        FINAL VALUE OF LIKELIHOOD FUNCTION                      ********************
 #OBJV:********************************************    -5839.202       **************************************************

 ********************                STOCHASTIC APPROXIMATION EXPECTATION-MAXIMIZATION               ********************
 ********************                             FINAL PARAMETER ESTIMATE                           ********************

 THETA - VECTOR OF FIXED EFFECTS PARAMETERS   *********
         TH 1      TH 2      TH 3      TH 4      TH 5      TH 6
         1.08E+00  4.37E+00  2.37E-01  5.57E+00  2.34E+00  2.39E+00

 OMEGA - COV MATRIX FOR RANDOM EFFECTS - ETAS  ********
         ETA1      ETA2      ETA3      ETA4      ETA5      ETA6      ETA7
 ETA1
+        5.33E-04
 ETA2
+       -9.44E-03  1.67E-01
 ETA3
+        0.00E+00  0.00E+00  1.62E-04
 ETA4
+        0.00E+00  0.00E+00  0.00E+00  2.90E-01
 ETA5
+        0.00E+00  0.00E+00  0.00E+00  5.21E-02  9.36E-03
 ETA6
+        0.00E+00  0.00E+00  0.00E+00  0.00E+00  0.00E+00  3.27E-01
 ETA7
+        0.00E+00  0.00E+00  0.00E+00  0.00E+00  0.00E+00  0.00E+00  0.00E+00

 SIGMA - COV MATRIX FOR RANDOM EFFECTS - EPSILONS  ****
         EPS1      EPS2
 EPS1
+        8.18E-02
 EPS2
+        0.00E+00  0.00E+00

 OMEGA - CORR MATRIX FOR RANDOM EFFECTS - ETAS  *******
         ETA1      ETA2      ETA3      ETA4      ETA5      ETA6      ETA7
 ETA1
+        2.31E-02
 ETA2
+       -1.00E+00  4.09E-01
 ETA3
+        0.00E+00  0.00E+00  1.27E-02
 ETA4
+        0.00E+00  0.00E+00  0.00E+00  5.39E-01
 ETA5
+        0.00E+00  0.00E+00  0.00E+00  1.00E+00  9.68E-02
 ETA6
+        0.00E+00  0.00E+00  0.00E+00  0.00E+00  0.00E+00  5.72E-01
 ETA7
+        0.00E+00  0.00E+00  0.00E+00  0.00E+00  0.00E+00  0.00E+00  0.00E+00

 SIGMA - CORR MATRIX FOR RANDOM EFFECTS - EPSILONS  ***
         EPS1      EPS2
 EPS1
+        2.86E-01
 EPS2
+        0.00E+00  0.00E+00

 ********************                STOCHASTIC APPROXIMATION EXPECTATION-MAXIMIZATION               ********************
 ********************                          STANDARD ERROR OF ESTIMATE (S)                        ********************

 THETA - VECTOR OF FIXED EFFECTS PARAMETERS   *********
         TH 1      TH 2      TH 3      TH 4      TH 5      TH 6
         3.41E-03  4.78E-02  5.25E-02  2.58E-01  4.66E-02  1.18E-01

 OMEGA - COV MATRIX FOR RANDOM EFFECTS - ETAS  ********
         ETA1      ETA2      ETA3      ETA4      ETA5      ETA6      ETA7
 ETA1
+        1.06E-04
 ETA2
+        1.87E-03  3.31E-02
 ETA3
+        0.00E+00  0.00E+00  9.14E-04
 ETA4
+        0.00E+00  0.00E+00  0.00E+00  2.36E-01
 ETA5
+        0.00E+00  0.00E+00  0.00E+00  4.24E-02  7.64E-03
 ETA6
+        0.00E+00  0.00E+00  0.00E+00  0.00E+00  0.00E+00  1.25E-01
 ETA7
+        0.00E+00  0.00E+00  0.00E+00  0.00E+00  0.00E+00  0.00E+00  0.00E+00

 SIGMA - COV MATRIX FOR RANDOM EFFECTS - EPSILONS  ****
         EPS1      EPS2
 EPS1
+        6.49E-03
 EPS2
+        0.00E+00  0.00E+00

 OMEGA - CORR MATRIX FOR RANDOM EFFECTS - ETAS  *******
         ETA1      ETA2      ETA3      ETA4      ETA5      ETA6      ETA7
 ETA1
+        2.31E-03
 ETA2
+        7.94E-05  4.05E-02
 ETA3
+       ......... .........  3.59E-02
 ETA4
+       ......... ......... .........  2.19E-01
 ETA5
+       ......... ......... .........  1.95E-04  3.95E-02
 ETA6
+       ......... ......... ......... ......... .........  1.09E-01
 ETA7
+       ......... ......... ......... ......... ......... ......... .........

 SIGMA - CORR MATRIX FOR RANDOM EFFECTS - EPSILONS  ***
         EPS1      EPS2
 EPS1
+        1.13E-02
 EPS2
+       ......... .........
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
 ********************                STOCHASTIC APPROXIMATION EXPECTATION-MAXIMIZATION               ********************
 ********************                    EIGENVALUES OF COR MATRIX OF ESTIMATE (S)                   ********************

             1         2         3         4         5         6         7         8         9        10        11        12
             13        14        15
         3.21E-08  9.39E-08  2.12E-03  2.75E-03  1.24E-02  2.66E-02  2.69E-01  3.34E-01  7.38E-01  8.48E-01  1.16E+00  1.73E+00
          1.80E+00  3.14E+00  4.95E+00
 #TBLN:      2
 #METH: Objective Function Evaluation by Importance Sampling
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
 #TERM:
 EXPECTATION ONLY PROCESS WAS COMPLETED

 ETABAR IS THE ARITHMETIC MEAN OF THE ETA-ESTIMATES,
 AND THE P-VALUE IS GIVEN FOR THE NULL HYPOTHESIS THAT THE TRUE MEAN IS 0.

 ETABAR:         1.1161E-03 -1.9785E-02  4.1842E-05 -5.2771E-03 -9.4933E-04  1.5807E-03  0.0000E+00
 SE:             2.2376E-03  3.9658E-02  2.1136E-05  2.2294E-02  4.0030E-03  5.1079E-02  0.0000E+00
 N:                      90          90          90          90          90          90           0

 P VAL.:         6.1794E-01  6.1787E-01  4.7740E-02  8.1289E-01  8.1254E-01  9.7531E-01  1.0000E+00

 ETASHRINKSD(%)  7.5031E+00  7.5004E+00  9.8417E+01  6.0530E+01  6.0530E+01  1.4765E+01  0.0000E+00
 ETASHRINKVR(%)  1.4443E+01  1.4438E+01  9.9975E+01  8.4421E+01  8.4421E+01  2.7349E+01  0.0000E+00
 EBVSHRINKSD(%)  7.3025E+00  7.3016E+00  9.7494E+01  6.1836E+01  6.1836E+01  1.5043E+01  0.0000E+00
 EBVSHRINKVR(%)  1.4072E+01  1.4070E+01  9.9937E+01  8.5435E+01  8.5435E+01  2.7822E+01  0.0000E+00
 RELATIVEINF(%)  0.0000E+00  0.0000E+00  0.0000E+00  0.0000E+00  0.0000E+00  0.0000E+00  0.0000E+00
 EPSSHRINKSD(%)  1.3345E+01  1.0000E+02
 EPSSHRINKVR(%)  2.4909E+01  1.0000E+02


 TOTAL DATA POINTS NORMALLY DISTRIBUTED (N):          641
 N*LOG(2PI) CONSTANT TO OBJECTIVE FUNCTION:    1178.0791995683903
 OBJECTIVE FUNCTION VALUE WITHOUT CONSTANT:   -1723.1821105321615
 OBJECTIVE FUNCTION VALUE WITH CONSTANT:      -545.10291096377114
 REPORTED OBJECTIVE FUNCTION DOES NOT CONTAIN CONSTANT

 TOTAL EFFECTIVE ETAS (NIND*NETA):                           540


 #TERE:
 Elapsed estimation  time in seconds:    45.92

 Number of Negative Eigenvalues in Matrix=           6
 Most negative value=  -265277753970498.16
 Most positive value=   131643598.80298981
 Forcing positive definiteness
 Root mean square deviation of matrix from original=    1.9999999999997529

 Elapsed covariance  time in seconds:     5.45

 ********************               OBJECTIVE FUNCTION EVALUATION BY IMPORTANCE SAMPLING             ********************
 #OBJT:**************                        FINAL VALUE OF OBJECTIVE FUNCTION                       ********************
 #OBJV:********************************************    -1723.182       **************************************************

 ********************               OBJECTIVE FUNCTION EVALUATION BY IMPORTANCE SAMPLING             ********************
 ********************                             FINAL PARAMETER ESTIMATE                           ********************

 THETA - VECTOR OF FIXED EFFECTS PARAMETERS   *********
         TH 1      TH 2      TH 3      TH 4      TH 5      TH 6
         1.08E+00  4.37E+00  2.37E-01  5.57E+00  2.34E+00  2.39E+00

 OMEGA - COV MATRIX FOR RANDOM EFFECTS - ETAS  ********
         ETA1      ETA2      ETA3      ETA4      ETA5      ETA6      ETA7
 ETA1
+        5.33E-04
 ETA2
+       -9.44E-03  1.67E-01
 ETA3
+        0.00E+00  0.00E+00  1.62E-04
 ETA4
+        0.00E+00  0.00E+00  0.00E+00  2.90E-01
 ETA5
+        0.00E+00  0.00E+00  0.00E+00  5.21E-02  9.36E-03
 ETA6
+        0.00E+00  0.00E+00  0.00E+00  0.00E+00  0.00E+00  3.27E-01
 ETA7
+        0.00E+00  0.00E+00  0.00E+00  0.00E+00  0.00E+00  0.00E+00  0.00E+00

 SIGMA - COV MATRIX FOR RANDOM EFFECTS - EPSILONS  ****
         EPS1      EPS2
 EPS1
+        8.18E-02
 EPS2
+        0.00E+00  0.00E+00

 OMEGA - CORR MATRIX FOR RANDOM EFFECTS - ETAS  *******
         ETA1      ETA2      ETA3      ETA4      ETA5      ETA6      ETA7
 ETA1
+        2.31E-02
 ETA2
+       -1.00E+00  4.09E-01
 ETA3
+        0.00E+00  0.00E+00  1.27E-02
 ETA4
+        0.00E+00  0.00E+00  0.00E+00  5.39E-01
 ETA5
+        0.00E+00  0.00E+00  0.00E+00  1.00E+00  9.68E-02
 ETA6
+        0.00E+00  0.00E+00  0.00E+00  0.00E+00  0.00E+00  5.72E-01
 ETA7
+        0.00E+00  0.00E+00  0.00E+00  0.00E+00  0.00E+00  0.00E+00  0.00E+00

 SIGMA - CORR MATRIX FOR RANDOM EFFECTS - EPSILONS  ***
         EPS1      EPS2
 EPS1
+        2.86E-01
 EPS2
+        0.00E+00  0.00E+00

 ********************               OBJECTIVE FUNCTION EVALUATION BY IMPORTANCE SAMPLING             ********************
 ********************                          STANDARD ERROR OF ESTIMATE (R)                        ********************

 THETA - VECTOR OF FIXED EFFECTS PARAMETERS   *********
         TH 1      TH 2      TH 3      TH 4      TH 5      TH 6
         3.32E-03  4.56E-02  8.33E-03  2.72E-01  4.83E-02  1.23E-01

 OMEGA - COV MATRIX FOR RANDOM EFFECTS - ETAS  ********
         ETA1      ETA2      ETA3      ETA4      ETA5      ETA6      ETA7
 ETA1
+        6.66E-06
 ETA2
+        1.46E-04  4.45E-03
 ETA3
+        0.00E+00  0.00E+00  1.84E-03
 ETA4
+        0.00E+00  0.00E+00  0.00E+00  5.42E-03
 ETA5
+        0.00E+00  0.00E+00  0.00E+00  2.74E-03  9.48E-04
 ETA6
+        0.00E+00  0.00E+00  0.00E+00  0.00E+00  0.00E+00  8.56E-02
 ETA7
+        0.00E+00  0.00E+00  0.00E+00  0.00E+00  0.00E+00  0.00E+00  0.00E+00

 SIGMA - COV MATRIX FOR RANDOM EFFECTS - EPSILONS  ****
         EPS1      EPS2
 EPS1
+        5.65E-03
 EPS2
+        0.00E+00  0.00E+00

 OMEGA - CORR MATRIX FOR RANDOM EFFECTS - ETAS  *******
         ETA1      ETA2      ETA3      ETA4      ETA5      ETA6      ETA7
 ETA1
+        1.44E-04
 ETA2
+        1.66E-04  5.44E-03
 ETA3
+       ......... .........  7.23E-02
 ETA4
+       ......... ......... .........  5.03E-03
 ETA5
+       ......... ......... .........  3.76E-04  4.90E-03
 ETA6
+       ......... ......... ......... ......... .........  7.49E-02
 ETA7
+       ......... ......... ......... ......... ......... ......... .........

 SIGMA - CORR MATRIX FOR RANDOM EFFECTS - EPSILONS  ***
         EPS1      EPS2
 EPS1
+        9.87E-03
 EPS2
+       ......... .........
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
 ********************               OBJECTIVE FUNCTION EVALUATION BY IMPORTANCE SAMPLING             ********************
 ********************                    EIGENVALUES OF COR MATRIX OF ESTIMATE (R)                   ********************

             1         2         3         4         5         6         7         8         9        10        11        12
             13        14        15
         2.75E-06  8.33E-06  4.51E-05  2.72E-03  9.28E-02  2.45E-01  2.64E-01  4.86E-01  5.19E-01  9.80E-01  1.07E+00  1.35E+00
          2.12E+00  3.28E+00  4.59E+00
 Elapsed postprocess time in seconds:     0.05
 Elapsed finaloutput time in seconds:     0.03
 #CPUT: Total CPU Time in Seconds,      124.943
